# Auto-generated by AgentsMD-compatible template processor
units metal
dimension 3
boundary p p p
atom_style atomic

variable initTemp equal 500
variable targetTemp equal 500
variable runSteps equal 5000
variable boxSize equal 4

lattice fcc 3.615
region box block 0 4 0 4 0 4
create_box 1 box
create_atoms 1 box
mass 1 63.546

pair_style eam
pair_coeff 1 1 /Users/macos/Desktop/lammps_agent/backend/outputs/0a2961b7ad96/uploaded_01_Cu_custom.eam

neighbor 2.0 bin
neigh_modify delay 10 check yes
timestep 0.001
velocity all create 500 4928459 mom yes rot yes dist gaussian
thermo 100
thermo_style custom step temp pe ke etotal press
dump 1 all custom 100 dump.atom id type x y z

fix 1 all nvt temp 500 500 0.1
run 5000
